<Lems>

    <!--

        This LEMS file has been automatically generated using PyNeuroML v0.3.5 (libNeuroML v0.2.36)

     -->

    <!-- Specify which component to run -->
    <Target component="Sim_Balanced"/>

    <!-- Include core NeuroML2 ComponentType definitions -->
    <Include file="Cells.xml"/>
    <Include file="Networks.xml"/>
    <Include file="Simulation.xml"/>

    <Include file="Balanced/HH_477127614.cell.nml"/>
    <Include file="Balanced/IMchan.channel.nml"/>
    <Include file="Balanced/Kd.channel.nml"/>
    <Include file="Balanced/Leak.channel.nml"/>
    <Include file="Balanced/Na.channel.nml"/>
    <Include file="Balanced/HH_476686112.cell.nml"/>
    <Include file="Balanced/cADpyr229_L23_PC_5ecbf9b163_0_0.cell.nml"/>
    <Include file="Balanced/pas.channel.nml"/>
    <Include file="Balanced/Ih.channel.nml"/>
    <Include file="Balanced/NaTs2_t.channel.nml"/>
    <Include file="Balanced/SKv3_1.channel.nml"/>
    <Include file="Balanced/Im.channel.nml"/>
    <Include file="Balanced/NaTa_t.channel.nml"/>
    <Include file="Balanced/K_Tst.channel.nml"/>
    <Include file="Balanced/Nap_Et2.channel.nml"/>
    <Include file="Balanced/SK_E2.channel.nml"/>
    <Include file="Balanced/Ca_HVA.channel.nml"/>
    <Include file="Balanced/K_Pst.channel.nml"/>
    <Include file="Balanced/CaDynamics_E2_NML2.nml"/>
    <Include file="Balanced/Ca_LVAst.channel.nml"/>
    <Include file="Balanced.net.nml"/>

    <Simulation id="Sim_Balanced" length="1000ms" step="0.025ms" target="Balanced" seed="12345">  <!-- Note seed: ensures same random numbers used every run -->

        <Display id="popBBP" title="Plots of popBBP" timeScale="1ms" xmin="-100.0" xmax="1100.0" ymin="-80" ymax="40">
            <Line id="popBBP_0_cADpyr229_L23_PC_5ecbf9b163_0_0_v" quantity="popBBP/0/cADpyr229_L23_PC_5ecbf9b163_0_0/v" scale="1mV" color="#6aa799" timeScale="1ms"/>
        </Display>

        <Display id="popInh" title="Plots of popInh" timeScale="1ms" xmin="-100.0" xmax="1100.0" ymin="-80" ymax="40">
            <Line id="popInh_0_HH_476686112_v" quantity="popInh/0/HH_476686112/v" scale="1mV" color="#029a72" timeScale="1ms"/>
            <Line id="popInh_1_HH_476686112_v" quantity="popInh/1/HH_476686112/v" scale="1mV" color="#d340bb" timeScale="1ms"/>
            <Line id="popInh_2_HH_476686112_v" quantity="popInh/2/HH_476686112/v" scale="1mV" color="#4c73a9" timeScale="1ms"/>
            <Line id="popInh_3_HH_476686112_v" quantity="popInh/3/HH_476686112/v" scale="1mV" color="#5e503a" timeScale="1ms"/>
            <Line id="popInh_4_HH_476686112_v" quantity="popInh/4/HH_476686112/v" scale="1mV" color="#3193ca" timeScale="1ms"/>
        </Display>

        <Display id="popExc" title="Plots of popExc" timeScale="1ms" xmin="-100.0" xmax="1100.0" ymin="-80" ymax="40">
            <Line id="popExc_0_HH_477127614_v" quantity="popExc/0/HH_477127614/v" scale="1mV" color="#90e5e9" timeScale="1ms"/>
            <Line id="popExc_1_HH_477127614_v" quantity="popExc/1/HH_477127614/v" scale="1mV" color="#29645f" timeScale="1ms"/>
            <Line id="popExc_2_HH_477127614_v" quantity="popExc/2/HH_477127614/v" scale="1mV" color="#1fcff4" timeScale="1ms"/>
            <Line id="popExc_3_HH_477127614_v" quantity="popExc/3/HH_477127614/v" scale="1mV" color="#6ed4e9" timeScale="1ms"/>
            <Line id="popExc_4_HH_477127614_v" quantity="popExc/4/HH_477127614/v" scale="1mV" color="#8fe460" timeScale="1ms"/>
        </Display>

        <OutputFile id="popBBP_v_dat" fileName="popBBP_v.dat">
            <OutputColumn id="popBBP_0_cADpyr229_L23_PC_5ecbf9b163_0_0_v" quantity="popBBP/0/cADpyr229_L23_PC_5ecbf9b163_0_0/v"/>
        </OutputFile>

        <OutputFile id="popInh_v_dat" fileName="popInh_v.dat">
            <OutputColumn id="popInh_0_HH_476686112_v" quantity="popInh/0/HH_476686112/v"/>
            <OutputColumn id="popInh_1_HH_476686112_v" quantity="popInh/1/HH_476686112/v"/>
            <OutputColumn id="popInh_2_HH_476686112_v" quantity="popInh/2/HH_476686112/v"/>
            <OutputColumn id="popInh_3_HH_476686112_v" quantity="popInh/3/HH_476686112/v"/>
            <OutputColumn id="popInh_4_HH_476686112_v" quantity="popInh/4/HH_476686112/v"/>
        </OutputFile>

        <OutputFile id="popExc_v_dat" fileName="popExc_v.dat">
            <OutputColumn id="popExc_0_HH_477127614_v" quantity="popExc/0/HH_477127614/v"/>
            <OutputColumn id="popExc_1_HH_477127614_v" quantity="popExc/1/HH_477127614/v"/>
            <OutputColumn id="popExc_2_HH_477127614_v" quantity="popExc/2/HH_477127614/v"/>
            <OutputColumn id="popExc_3_HH_477127614_v" quantity="popExc/3/HH_477127614/v"/>
            <OutputColumn id="popExc_4_HH_477127614_v" quantity="popExc/4/HH_477127614/v"/>
        </OutputFile>

        <EventOutputFile id="Spikes_file__popExc" fileName="Sim_Balanced.popExc.spikes" format="ID_TIME">
            <EventSelection id="0" select="popExc/0/HH_477127614" eventPort="spike"/>
            <EventSelection id="1" select="popExc/1/HH_477127614" eventPort="spike"/>
            <EventSelection id="2" select="popExc/2/HH_477127614" eventPort="spike"/>
            <EventSelection id="3" select="popExc/3/HH_477127614" eventPort="spike"/>
            <EventSelection id="4" select="popExc/4/HH_477127614" eventPort="spike"/>
            <EventSelection id="5" select="popExc/5/HH_477127614" eventPort="spike"/>
            <EventSelection id="6" select="popExc/6/HH_477127614" eventPort="spike"/>
            <EventSelection id="7" select="popExc/7/HH_477127614" eventPort="spike"/>
            <EventSelection id="8" select="popExc/8/HH_477127614" eventPort="spike"/>
            <EventSelection id="9" select="popExc/9/HH_477127614" eventPort="spike"/>
            <EventSelection id="10" select="popExc/10/HH_477127614" eventPort="spike"/>
            <EventSelection id="11" select="popExc/11/HH_477127614" eventPort="spike"/>
            <EventSelection id="12" select="popExc/12/HH_477127614" eventPort="spike"/>
            <EventSelection id="13" select="popExc/13/HH_477127614" eventPort="spike"/>
            <EventSelection id="14" select="popExc/14/HH_477127614" eventPort="spike"/>
            <EventSelection id="15" select="popExc/15/HH_477127614" eventPort="spike"/>
            <EventSelection id="16" select="popExc/16/HH_477127614" eventPort="spike"/>
            <EventSelection id="17" select="popExc/17/HH_477127614" eventPort="spike"/>
            <EventSelection id="18" select="popExc/18/HH_477127614" eventPort="spike"/>
            <EventSelection id="19" select="popExc/19/HH_477127614" eventPort="spike"/>
            <EventSelection id="20" select="popExc/20/HH_477127614" eventPort="spike"/>
            <EventSelection id="21" select="popExc/21/HH_477127614" eventPort="spike"/>
            <EventSelection id="22" select="popExc/22/HH_477127614" eventPort="spike"/>
            <EventSelection id="23" select="popExc/23/HH_477127614" eventPort="spike"/>
            <EventSelection id="24" select="popExc/24/HH_477127614" eventPort="spike"/>
            <EventSelection id="25" select="popExc/25/HH_477127614" eventPort="spike"/>
            <EventSelection id="26" select="popExc/26/HH_477127614" eventPort="spike"/>
            <EventSelection id="27" select="popExc/27/HH_477127614" eventPort="spike"/>
            <EventSelection id="28" select="popExc/28/HH_477127614" eventPort="spike"/>
            <EventSelection id="29" select="popExc/29/HH_477127614" eventPort="spike"/>
            <EventSelection id="30" select="popExc/30/HH_477127614" eventPort="spike"/>
            <EventSelection id="31" select="popExc/31/HH_477127614" eventPort="spike"/>
            <EventSelection id="32" select="popExc/32/HH_477127614" eventPort="spike"/>
            <EventSelection id="33" select="popExc/33/HH_477127614" eventPort="spike"/>
            <EventSelection id="34" select="popExc/34/HH_477127614" eventPort="spike"/>
            <EventSelection id="35" select="popExc/35/HH_477127614" eventPort="spike"/>
            <EventSelection id="36" select="popExc/36/HH_477127614" eventPort="spike"/>
            <EventSelection id="37" select="popExc/37/HH_477127614" eventPort="spike"/>
            <EventSelection id="38" select="popExc/38/HH_477127614" eventPort="spike"/>
            <EventSelection id="39" select="popExc/39/HH_477127614" eventPort="spike"/>
            <EventSelection id="40" select="popExc/40/HH_477127614" eventPort="spike"/>
            <EventSelection id="41" select="popExc/41/HH_477127614" eventPort="spike"/>
            <EventSelection id="42" select="popExc/42/HH_477127614" eventPort="spike"/>
            <EventSelection id="43" select="popExc/43/HH_477127614" eventPort="spike"/>
            <EventSelection id="44" select="popExc/44/HH_477127614" eventPort="spike"/>
            <EventSelection id="45" select="popExc/45/HH_477127614" eventPort="spike"/>
            <EventSelection id="46" select="popExc/46/HH_477127614" eventPort="spike"/>
            <EventSelection id="47" select="popExc/47/HH_477127614" eventPort="spike"/>
            <EventSelection id="48" select="popExc/48/HH_477127614" eventPort="spike"/>
            <EventSelection id="49" select="popExc/49/HH_477127614" eventPort="spike"/>
            <EventSelection id="50" select="popExc/50/HH_477127614" eventPort="spike"/>
            <EventSelection id="51" select="popExc/51/HH_477127614" eventPort="spike"/>
            <EventSelection id="52" select="popExc/52/HH_477127614" eventPort="spike"/>
            <EventSelection id="53" select="popExc/53/HH_477127614" eventPort="spike"/>
            <EventSelection id="54" select="popExc/54/HH_477127614" eventPort="spike"/>
            <EventSelection id="55" select="popExc/55/HH_477127614" eventPort="spike"/>
            <EventSelection id="56" select="popExc/56/HH_477127614" eventPort="spike"/>
            <EventSelection id="57" select="popExc/57/HH_477127614" eventPort="spike"/>
            <EventSelection id="58" select="popExc/58/HH_477127614" eventPort="spike"/>
            <EventSelection id="59" select="popExc/59/HH_477127614" eventPort="spike"/>
            <EventSelection id="60" select="popExc/60/HH_477127614" eventPort="spike"/>
            <EventSelection id="61" select="popExc/61/HH_477127614" eventPort="spike"/>
            <EventSelection id="62" select="popExc/62/HH_477127614" eventPort="spike"/>
            <EventSelection id="63" select="popExc/63/HH_477127614" eventPort="spike"/>
            <EventSelection id="64" select="popExc/64/HH_477127614" eventPort="spike"/>
            <EventSelection id="65" select="popExc/65/HH_477127614" eventPort="spike"/>
            <EventSelection id="66" select="popExc/66/HH_477127614" eventPort="spike"/>
            <EventSelection id="67" select="popExc/67/HH_477127614" eventPort="spike"/>
            <EventSelection id="68" select="popExc/68/HH_477127614" eventPort="spike"/>
            <EventSelection id="69" select="popExc/69/HH_477127614" eventPort="spike"/>
            <EventSelection id="70" select="popExc/70/HH_477127614" eventPort="spike"/>
            <EventSelection id="71" select="popExc/71/HH_477127614" eventPort="spike"/>
            <EventSelection id="72" select="popExc/72/HH_477127614" eventPort="spike"/>
            <EventSelection id="73" select="popExc/73/HH_477127614" eventPort="spike"/>
            <EventSelection id="74" select="popExc/74/HH_477127614" eventPort="spike"/>
            <EventSelection id="75" select="popExc/75/HH_477127614" eventPort="spike"/>
            <EventSelection id="76" select="popExc/76/HH_477127614" eventPort="spike"/>
            <EventSelection id="77" select="popExc/77/HH_477127614" eventPort="spike"/>
            <EventSelection id="78" select="popExc/78/HH_477127614" eventPort="spike"/>
            <EventSelection id="79" select="popExc/79/HH_477127614" eventPort="spike"/>
            <EventSelection id="80" select="popExc/80/HH_477127614" eventPort="spike"/>
            <EventSelection id="81" select="popExc/81/HH_477127614" eventPort="spike"/>
            <EventSelection id="82" select="popExc/82/HH_477127614" eventPort="spike"/>
            <EventSelection id="83" select="popExc/83/HH_477127614" eventPort="spike"/>
            <EventSelection id="84" select="popExc/84/HH_477127614" eventPort="spike"/>
            <EventSelection id="85" select="popExc/85/HH_477127614" eventPort="spike"/>
            <EventSelection id="86" select="popExc/86/HH_477127614" eventPort="spike"/>
            <EventSelection id="87" select="popExc/87/HH_477127614" eventPort="spike"/>
            <EventSelection id="88" select="popExc/88/HH_477127614" eventPort="spike"/>
            <EventSelection id="89" select="popExc/89/HH_477127614" eventPort="spike"/>
            <EventSelection id="90" select="popExc/90/HH_477127614" eventPort="spike"/>
            <EventSelection id="91" select="popExc/91/HH_477127614" eventPort="spike"/>
            <EventSelection id="92" select="popExc/92/HH_477127614" eventPort="spike"/>
            <EventSelection id="93" select="popExc/93/HH_477127614" eventPort="spike"/>
            <EventSelection id="94" select="popExc/94/HH_477127614" eventPort="spike"/>
            <EventSelection id="95" select="popExc/95/HH_477127614" eventPort="spike"/>
            <EventSelection id="96" select="popExc/96/HH_477127614" eventPort="spike"/>
            <EventSelection id="97" select="popExc/97/HH_477127614" eventPort="spike"/>
            <EventSelection id="98" select="popExc/98/HH_477127614" eventPort="spike"/>
            <EventSelection id="99" select="popExc/99/HH_477127614" eventPort="spike"/>
            <EventSelection id="100" select="popExc/100/HH_477127614" eventPort="spike"/>
            <EventSelection id="101" select="popExc/101/HH_477127614" eventPort="spike"/>
            <EventSelection id="102" select="popExc/102/HH_477127614" eventPort="spike"/>
            <EventSelection id="103" select="popExc/103/HH_477127614" eventPort="spike"/>
            <EventSelection id="104" select="popExc/104/HH_477127614" eventPort="spike"/>
            <EventSelection id="105" select="popExc/105/HH_477127614" eventPort="spike"/>
            <EventSelection id="106" select="popExc/106/HH_477127614" eventPort="spike"/>
            <EventSelection id="107" select="popExc/107/HH_477127614" eventPort="spike"/>
            <EventSelection id="108" select="popExc/108/HH_477127614" eventPort="spike"/>
            <EventSelection id="109" select="popExc/109/HH_477127614" eventPort="spike"/>
            <EventSelection id="110" select="popExc/110/HH_477127614" eventPort="spike"/>
            <EventSelection id="111" select="popExc/111/HH_477127614" eventPort="spike"/>
            <EventSelection id="112" select="popExc/112/HH_477127614" eventPort="spike"/>
            <EventSelection id="113" select="popExc/113/HH_477127614" eventPort="spike"/>
            <EventSelection id="114" select="popExc/114/HH_477127614" eventPort="spike"/>
            <EventSelection id="115" select="popExc/115/HH_477127614" eventPort="spike"/>
            <EventSelection id="116" select="popExc/116/HH_477127614" eventPort="spike"/>
            <EventSelection id="117" select="popExc/117/HH_477127614" eventPort="spike"/>
            <EventSelection id="118" select="popExc/118/HH_477127614" eventPort="spike"/>
            <EventSelection id="119" select="popExc/119/HH_477127614" eventPort="spike"/>
            <EventSelection id="120" select="popExc/120/HH_477127614" eventPort="spike"/>
            <EventSelection id="121" select="popExc/121/HH_477127614" eventPort="spike"/>
            <EventSelection id="122" select="popExc/122/HH_477127614" eventPort="spike"/>
            <EventSelection id="123" select="popExc/123/HH_477127614" eventPort="spike"/>
            <EventSelection id="124" select="popExc/124/HH_477127614" eventPort="spike"/>
            <EventSelection id="125" select="popExc/125/HH_477127614" eventPort="spike"/>
            <EventSelection id="126" select="popExc/126/HH_477127614" eventPort="spike"/>
            <EventSelection id="127" select="popExc/127/HH_477127614" eventPort="spike"/>
            <EventSelection id="128" select="popExc/128/HH_477127614" eventPort="spike"/>
            <EventSelection id="129" select="popExc/129/HH_477127614" eventPort="spike"/>
            <EventSelection id="130" select="popExc/130/HH_477127614" eventPort="spike"/>
            <EventSelection id="131" select="popExc/131/HH_477127614" eventPort="spike"/>
            <EventSelection id="132" select="popExc/132/HH_477127614" eventPort="spike"/>
            <EventSelection id="133" select="popExc/133/HH_477127614" eventPort="spike"/>
            <EventSelection id="134" select="popExc/134/HH_477127614" eventPort="spike"/>
            <EventSelection id="135" select="popExc/135/HH_477127614" eventPort="spike"/>
            <EventSelection id="136" select="popExc/136/HH_477127614" eventPort="spike"/>
            <EventSelection id="137" select="popExc/137/HH_477127614" eventPort="spike"/>
            <EventSelection id="138" select="popExc/138/HH_477127614" eventPort="spike"/>
            <EventSelection id="139" select="popExc/139/HH_477127614" eventPort="spike"/>
            <EventSelection id="140" select="popExc/140/HH_477127614" eventPort="spike"/>
            <EventSelection id="141" select="popExc/141/HH_477127614" eventPort="spike"/>
            <EventSelection id="142" select="popExc/142/HH_477127614" eventPort="spike"/>
            <EventSelection id="143" select="popExc/143/HH_477127614" eventPort="spike"/>
            <EventSelection id="144" select="popExc/144/HH_477127614" eventPort="spike"/>
            <EventSelection id="145" select="popExc/145/HH_477127614" eventPort="spike"/>
            <EventSelection id="146" select="popExc/146/HH_477127614" eventPort="spike"/>
            <EventSelection id="147" select="popExc/147/HH_477127614" eventPort="spike"/>
            <EventSelection id="148" select="popExc/148/HH_477127614" eventPort="spike"/>
            <EventSelection id="149" select="popExc/149/HH_477127614" eventPort="spike"/>
            <EventSelection id="150" select="popExc/150/HH_477127614" eventPort="spike"/>
            <EventSelection id="151" select="popExc/151/HH_477127614" eventPort="spike"/>
            <EventSelection id="152" select="popExc/152/HH_477127614" eventPort="spike"/>
            <EventSelection id="153" select="popExc/153/HH_477127614" eventPort="spike"/>
            <EventSelection id="154" select="popExc/154/HH_477127614" eventPort="spike"/>
            <EventSelection id="155" select="popExc/155/HH_477127614" eventPort="spike"/>
            <EventSelection id="156" select="popExc/156/HH_477127614" eventPort="spike"/>
            <EventSelection id="157" select="popExc/157/HH_477127614" eventPort="spike"/>
            <EventSelection id="158" select="popExc/158/HH_477127614" eventPort="spike"/>
            <EventSelection id="159" select="popExc/159/HH_477127614" eventPort="spike"/>
            <EventSelection id="160" select="popExc/160/HH_477127614" eventPort="spike"/>
            <EventSelection id="161" select="popExc/161/HH_477127614" eventPort="spike"/>
            <EventSelection id="162" select="popExc/162/HH_477127614" eventPort="spike"/>
            <EventSelection id="163" select="popExc/163/HH_477127614" eventPort="spike"/>
            <EventSelection id="164" select="popExc/164/HH_477127614" eventPort="spike"/>
            <EventSelection id="165" select="popExc/165/HH_477127614" eventPort="spike"/>
            <EventSelection id="166" select="popExc/166/HH_477127614" eventPort="spike"/>
            <EventSelection id="167" select="popExc/167/HH_477127614" eventPort="spike"/>
            <EventSelection id="168" select="popExc/168/HH_477127614" eventPort="spike"/>
            <EventSelection id="169" select="popExc/169/HH_477127614" eventPort="spike"/>
            <EventSelection id="170" select="popExc/170/HH_477127614" eventPort="spike"/>
            <EventSelection id="171" select="popExc/171/HH_477127614" eventPort="spike"/>
            <EventSelection id="172" select="popExc/172/HH_477127614" eventPort="spike"/>
            <EventSelection id="173" select="popExc/173/HH_477127614" eventPort="spike"/>
            <EventSelection id="174" select="popExc/174/HH_477127614" eventPort="spike"/>
            <EventSelection id="175" select="popExc/175/HH_477127614" eventPort="spike"/>
            <EventSelection id="176" select="popExc/176/HH_477127614" eventPort="spike"/>
            <EventSelection id="177" select="popExc/177/HH_477127614" eventPort="spike"/>
            <EventSelection id="178" select="popExc/178/HH_477127614" eventPort="spike"/>
            <EventSelection id="179" select="popExc/179/HH_477127614" eventPort="spike"/>
            <EventSelection id="180" select="popExc/180/HH_477127614" eventPort="spike"/>
            <EventSelection id="181" select="popExc/181/HH_477127614" eventPort="spike"/>
            <EventSelection id="182" select="popExc/182/HH_477127614" eventPort="spike"/>
            <EventSelection id="183" select="popExc/183/HH_477127614" eventPort="spike"/>
            <EventSelection id="184" select="popExc/184/HH_477127614" eventPort="spike"/>
            <EventSelection id="185" select="popExc/185/HH_477127614" eventPort="spike"/>
            <EventSelection id="186" select="popExc/186/HH_477127614" eventPort="spike"/>
            <EventSelection id="187" select="popExc/187/HH_477127614" eventPort="spike"/>
            <EventSelection id="188" select="popExc/188/HH_477127614" eventPort="spike"/>
            <EventSelection id="189" select="popExc/189/HH_477127614" eventPort="spike"/>
            <EventSelection id="190" select="popExc/190/HH_477127614" eventPort="spike"/>
            <EventSelection id="191" select="popExc/191/HH_477127614" eventPort="spike"/>
            <EventSelection id="192" select="popExc/192/HH_477127614" eventPort="spike"/>
            <EventSelection id="193" select="popExc/193/HH_477127614" eventPort="spike"/>
            <EventSelection id="194" select="popExc/194/HH_477127614" eventPort="spike"/>
            <EventSelection id="195" select="popExc/195/HH_477127614" eventPort="spike"/>
            <EventSelection id="196" select="popExc/196/HH_477127614" eventPort="spike"/>
            <EventSelection id="197" select="popExc/197/HH_477127614" eventPort="spike"/>
            <EventSelection id="198" select="popExc/198/HH_477127614" eventPort="spike"/>
            <EventSelection id="199" select="popExc/199/HH_477127614" eventPort="spike"/>
            <EventSelection id="200" select="popExc/200/HH_477127614" eventPort="spike"/>
            <EventSelection id="201" select="popExc/201/HH_477127614" eventPort="spike"/>
            <EventSelection id="202" select="popExc/202/HH_477127614" eventPort="spike"/>
            <EventSelection id="203" select="popExc/203/HH_477127614" eventPort="spike"/>
            <EventSelection id="204" select="popExc/204/HH_477127614" eventPort="spike"/>
            <EventSelection id="205" select="popExc/205/HH_477127614" eventPort="spike"/>
            <EventSelection id="206" select="popExc/206/HH_477127614" eventPort="spike"/>
            <EventSelection id="207" select="popExc/207/HH_477127614" eventPort="spike"/>
            <EventSelection id="208" select="popExc/208/HH_477127614" eventPort="spike"/>
            <EventSelection id="209" select="popExc/209/HH_477127614" eventPort="spike"/>
            <EventSelection id="210" select="popExc/210/HH_477127614" eventPort="spike"/>
            <EventSelection id="211" select="popExc/211/HH_477127614" eventPort="spike"/>
            <EventSelection id="212" select="popExc/212/HH_477127614" eventPort="spike"/>
            <EventSelection id="213" select="popExc/213/HH_477127614" eventPort="spike"/>
            <EventSelection id="214" select="popExc/214/HH_477127614" eventPort="spike"/>
            <EventSelection id="215" select="popExc/215/HH_477127614" eventPort="spike"/>
            <EventSelection id="216" select="popExc/216/HH_477127614" eventPort="spike"/>
            <EventSelection id="217" select="popExc/217/HH_477127614" eventPort="spike"/>
            <EventSelection id="218" select="popExc/218/HH_477127614" eventPort="spike"/>
            <EventSelection id="219" select="popExc/219/HH_477127614" eventPort="spike"/>
            <EventSelection id="220" select="popExc/220/HH_477127614" eventPort="spike"/>
            <EventSelection id="221" select="popExc/221/HH_477127614" eventPort="spike"/>
            <EventSelection id="222" select="popExc/222/HH_477127614" eventPort="spike"/>
            <EventSelection id="223" select="popExc/223/HH_477127614" eventPort="spike"/>
            <EventSelection id="224" select="popExc/224/HH_477127614" eventPort="spike"/>
            <EventSelection id="225" select="popExc/225/HH_477127614" eventPort="spike"/>
            <EventSelection id="226" select="popExc/226/HH_477127614" eventPort="spike"/>
            <EventSelection id="227" select="popExc/227/HH_477127614" eventPort="spike"/>
            <EventSelection id="228" select="popExc/228/HH_477127614" eventPort="spike"/>
            <EventSelection id="229" select="popExc/229/HH_477127614" eventPort="spike"/>
            <EventSelection id="230" select="popExc/230/HH_477127614" eventPort="spike"/>
            <EventSelection id="231" select="popExc/231/HH_477127614" eventPort="spike"/>
            <EventSelection id="232" select="popExc/232/HH_477127614" eventPort="spike"/>
            <EventSelection id="233" select="popExc/233/HH_477127614" eventPort="spike"/>
            <EventSelection id="234" select="popExc/234/HH_477127614" eventPort="spike"/>
            <EventSelection id="235" select="popExc/235/HH_477127614" eventPort="spike"/>
            <EventSelection id="236" select="popExc/236/HH_477127614" eventPort="spike"/>
            <EventSelection id="237" select="popExc/237/HH_477127614" eventPort="spike"/>
            <EventSelection id="238" select="popExc/238/HH_477127614" eventPort="spike"/>
            <EventSelection id="239" select="popExc/239/HH_477127614" eventPort="spike"/>
        </EventOutputFile>

        <EventOutputFile id="Spikes_file__popInh" fileName="Sim_Balanced.popInh.spikes" format="ID_TIME">
            <EventSelection id="0" select="popInh/0/HH_476686112" eventPort="spike"/>
            <EventSelection id="1" select="popInh/1/HH_476686112" eventPort="spike"/>
            <EventSelection id="2" select="popInh/2/HH_476686112" eventPort="spike"/>
            <EventSelection id="3" select="popInh/3/HH_476686112" eventPort="spike"/>
            <EventSelection id="4" select="popInh/4/HH_476686112" eventPort="spike"/>
            <EventSelection id="5" select="popInh/5/HH_476686112" eventPort="spike"/>
            <EventSelection id="6" select="popInh/6/HH_476686112" eventPort="spike"/>
            <EventSelection id="7" select="popInh/7/HH_476686112" eventPort="spike"/>
            <EventSelection id="8" select="popInh/8/HH_476686112" eventPort="spike"/>
            <EventSelection id="9" select="popInh/9/HH_476686112" eventPort="spike"/>
            <EventSelection id="10" select="popInh/10/HH_476686112" eventPort="spike"/>
            <EventSelection id="11" select="popInh/11/HH_476686112" eventPort="spike"/>
            <EventSelection id="12" select="popInh/12/HH_476686112" eventPort="spike"/>
            <EventSelection id="13" select="popInh/13/HH_476686112" eventPort="spike"/>
            <EventSelection id="14" select="popInh/14/HH_476686112" eventPort="spike"/>
            <EventSelection id="15" select="popInh/15/HH_476686112" eventPort="spike"/>
            <EventSelection id="16" select="popInh/16/HH_476686112" eventPort="spike"/>
            <EventSelection id="17" select="popInh/17/HH_476686112" eventPort="spike"/>
            <EventSelection id="18" select="popInh/18/HH_476686112" eventPort="spike"/>
            <EventSelection id="19" select="popInh/19/HH_476686112" eventPort="spike"/>
            <EventSelection id="20" select="popInh/20/HH_476686112" eventPort="spike"/>
            <EventSelection id="21" select="popInh/21/HH_476686112" eventPort="spike"/>
            <EventSelection id="22" select="popInh/22/HH_476686112" eventPort="spike"/>
            <EventSelection id="23" select="popInh/23/HH_476686112" eventPort="spike"/>
            <EventSelection id="24" select="popInh/24/HH_476686112" eventPort="spike"/>
            <EventSelection id="25" select="popInh/25/HH_476686112" eventPort="spike"/>
            <EventSelection id="26" select="popInh/26/HH_476686112" eventPort="spike"/>
            <EventSelection id="27" select="popInh/27/HH_476686112" eventPort="spike"/>
            <EventSelection id="28" select="popInh/28/HH_476686112" eventPort="spike"/>
            <EventSelection id="29" select="popInh/29/HH_476686112" eventPort="spike"/>
            <EventSelection id="30" select="popInh/30/HH_476686112" eventPort="spike"/>
            <EventSelection id="31" select="popInh/31/HH_476686112" eventPort="spike"/>
            <EventSelection id="32" select="popInh/32/HH_476686112" eventPort="spike"/>
            <EventSelection id="33" select="popInh/33/HH_476686112" eventPort="spike"/>
            <EventSelection id="34" select="popInh/34/HH_476686112" eventPort="spike"/>
            <EventSelection id="35" select="popInh/35/HH_476686112" eventPort="spike"/>
            <EventSelection id="36" select="popInh/36/HH_476686112" eventPort="spike"/>
            <EventSelection id="37" select="popInh/37/HH_476686112" eventPort="spike"/>
            <EventSelection id="38" select="popInh/38/HH_476686112" eventPort="spike"/>
            <EventSelection id="39" select="popInh/39/HH_476686112" eventPort="spike"/>
            <EventSelection id="40" select="popInh/40/HH_476686112" eventPort="spike"/>
            <EventSelection id="41" select="popInh/41/HH_476686112" eventPort="spike"/>
            <EventSelection id="42" select="popInh/42/HH_476686112" eventPort="spike"/>
            <EventSelection id="43" select="popInh/43/HH_476686112" eventPort="spike"/>
            <EventSelection id="44" select="popInh/44/HH_476686112" eventPort="spike"/>
            <EventSelection id="45" select="popInh/45/HH_476686112" eventPort="spike"/>
            <EventSelection id="46" select="popInh/46/HH_476686112" eventPort="spike"/>
            <EventSelection id="47" select="popInh/47/HH_476686112" eventPort="spike"/>
            <EventSelection id="48" select="popInh/48/HH_476686112" eventPort="spike"/>
            <EventSelection id="49" select="popInh/49/HH_476686112" eventPort="spike"/>
            <EventSelection id="50" select="popInh/50/HH_476686112" eventPort="spike"/>
            <EventSelection id="51" select="popInh/51/HH_476686112" eventPort="spike"/>
            <EventSelection id="52" select="popInh/52/HH_476686112" eventPort="spike"/>
            <EventSelection id="53" select="popInh/53/HH_476686112" eventPort="spike"/>
            <EventSelection id="54" select="popInh/54/HH_476686112" eventPort="spike"/>
            <EventSelection id="55" select="popInh/55/HH_476686112" eventPort="spike"/>
            <EventSelection id="56" select="popInh/56/HH_476686112" eventPort="spike"/>
            <EventSelection id="57" select="popInh/57/HH_476686112" eventPort="spike"/>
            <EventSelection id="58" select="popInh/58/HH_476686112" eventPort="spike"/>
            <EventSelection id="59" select="popInh/59/HH_476686112" eventPort="spike"/>
            <EventSelection id="60" select="popInh/60/HH_476686112" eventPort="spike"/>
            <EventSelection id="61" select="popInh/61/HH_476686112" eventPort="spike"/>
            <EventSelection id="62" select="popInh/62/HH_476686112" eventPort="spike"/>
            <EventSelection id="63" select="popInh/63/HH_476686112" eventPort="spike"/>
            <EventSelection id="64" select="popInh/64/HH_476686112" eventPort="spike"/>
            <EventSelection id="65" select="popInh/65/HH_476686112" eventPort="spike"/>
            <EventSelection id="66" select="popInh/66/HH_476686112" eventPort="spike"/>
            <EventSelection id="67" select="popInh/67/HH_476686112" eventPort="spike"/>
            <EventSelection id="68" select="popInh/68/HH_476686112" eventPort="spike"/>
            <EventSelection id="69" select="popInh/69/HH_476686112" eventPort="spike"/>
            <EventSelection id="70" select="popInh/70/HH_476686112" eventPort="spike"/>
            <EventSelection id="71" select="popInh/71/HH_476686112" eventPort="spike"/>
            <EventSelection id="72" select="popInh/72/HH_476686112" eventPort="spike"/>
            <EventSelection id="73" select="popInh/73/HH_476686112" eventPort="spike"/>
            <EventSelection id="74" select="popInh/74/HH_476686112" eventPort="spike"/>
            <EventSelection id="75" select="popInh/75/HH_476686112" eventPort="spike"/>
            <EventSelection id="76" select="popInh/76/HH_476686112" eventPort="spike"/>
            <EventSelection id="77" select="popInh/77/HH_476686112" eventPort="spike"/>
            <EventSelection id="78" select="popInh/78/HH_476686112" eventPort="spike"/>
            <EventSelection id="79" select="popInh/79/HH_476686112" eventPort="spike"/>
            <EventSelection id="80" select="popInh/80/HH_476686112" eventPort="spike"/>
            <EventSelection id="81" select="popInh/81/HH_476686112" eventPort="spike"/>
            <EventSelection id="82" select="popInh/82/HH_476686112" eventPort="spike"/>
            <EventSelection id="83" select="popInh/83/HH_476686112" eventPort="spike"/>
            <EventSelection id="84" select="popInh/84/HH_476686112" eventPort="spike"/>
            <EventSelection id="85" select="popInh/85/HH_476686112" eventPort="spike"/>
            <EventSelection id="86" select="popInh/86/HH_476686112" eventPort="spike"/>
            <EventSelection id="87" select="popInh/87/HH_476686112" eventPort="spike"/>
            <EventSelection id="88" select="popInh/88/HH_476686112" eventPort="spike"/>
            <EventSelection id="89" select="popInh/89/HH_476686112" eventPort="spike"/>
            <EventSelection id="90" select="popInh/90/HH_476686112" eventPort="spike"/>
            <EventSelection id="91" select="popInh/91/HH_476686112" eventPort="spike"/>
            <EventSelection id="92" select="popInh/92/HH_476686112" eventPort="spike"/>
            <EventSelection id="93" select="popInh/93/HH_476686112" eventPort="spike"/>
            <EventSelection id="94" select="popInh/94/HH_476686112" eventPort="spike"/>
            <EventSelection id="95" select="popInh/95/HH_476686112" eventPort="spike"/>
            <EventSelection id="96" select="popInh/96/HH_476686112" eventPort="spike"/>
            <EventSelection id="97" select="popInh/97/HH_476686112" eventPort="spike"/>
            <EventSelection id="98" select="popInh/98/HH_476686112" eventPort="spike"/>
            <EventSelection id="99" select="popInh/99/HH_476686112" eventPort="spike"/>
            <EventSelection id="100" select="popInh/100/HH_476686112" eventPort="spike"/>
            <EventSelection id="101" select="popInh/101/HH_476686112" eventPort="spike"/>
            <EventSelection id="102" select="popInh/102/HH_476686112" eventPort="spike"/>
            <EventSelection id="103" select="popInh/103/HH_476686112" eventPort="spike"/>
            <EventSelection id="104" select="popInh/104/HH_476686112" eventPort="spike"/>
            <EventSelection id="105" select="popInh/105/HH_476686112" eventPort="spike"/>
            <EventSelection id="106" select="popInh/106/HH_476686112" eventPort="spike"/>
            <EventSelection id="107" select="popInh/107/HH_476686112" eventPort="spike"/>
            <EventSelection id="108" select="popInh/108/HH_476686112" eventPort="spike"/>
            <EventSelection id="109" select="popInh/109/HH_476686112" eventPort="spike"/>
            <EventSelection id="110" select="popInh/110/HH_476686112" eventPort="spike"/>
            <EventSelection id="111" select="popInh/111/HH_476686112" eventPort="spike"/>
            <EventSelection id="112" select="popInh/112/HH_476686112" eventPort="spike"/>
            <EventSelection id="113" select="popInh/113/HH_476686112" eventPort="spike"/>
            <EventSelection id="114" select="popInh/114/HH_476686112" eventPort="spike"/>
            <EventSelection id="115" select="popInh/115/HH_476686112" eventPort="spike"/>
            <EventSelection id="116" select="popInh/116/HH_476686112" eventPort="spike"/>
            <EventSelection id="117" select="popInh/117/HH_476686112" eventPort="spike"/>
            <EventSelection id="118" select="popInh/118/HH_476686112" eventPort="spike"/>
            <EventSelection id="119" select="popInh/119/HH_476686112" eventPort="spike"/>
        </EventOutputFile>

        <EventOutputFile id="Spikes_file__popBBP" fileName="Sim_Balanced.popBBP.spikes" format="ID_TIME">
            <EventSelection id="0" select="popBBP/0/cADpyr229_L23_PC_5ecbf9b163_0_0" eventPort="spike"/>
        </EventOutputFile>

    </Simulation>

</Lems>
